*Heading
** Job name: omnineck Model name: omnineck
** Generated by: Abaqus/CAE 2022
*Preprint, echo=NO, model=NO, history=NO, contact=NO
**
** PARTS
**
*Part, name=omnineck
*Node
      1,           0.,          20.,          40.
      2,           0.,          20.,          35.
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*Element, type=C3D4
   1, 1145, 1146,   94,  961
   2, 1145,  990,  521,  520
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*Nset, nset=Set-omnineck, generate
    1,  1371,     1
*Elset, elset=Set-omnineck, generate
    1,  4192,     1
** Section: Section-omnineck
*Solid Section, elset=Set-omnineck, material=PU
,
*End Part
**
**
** ASSEMBLY
**
*Assembly, name=Assembly
**
*Instance, name=omnineck-1, part=omnineck
*End Instance
**
*Node
      1,           0.,           0.,          40.
*Nset, nset=Set-RP-1
 1,
*Nset, nset=Set-bottom, instance=omnineck-1
   95,   96,  109,  110,  516,  517
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*Elset, elset=Set-bottom, instance=omnineck-1
    2,   30,   39,   64,   65,   72
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*Nset, nset=Set-bound, instance=omnineck-1
   1,   4,   5,   6, 125, 126
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*Elset, elset=Set-bound, instance=omnineck-1
   15,   59,   68,  123,  135,  240
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*Nset, nset=Set-surface, instance=omnineck-1, generate
    1,  1144,     1
*Elset, elset=Set-surface, instance=omnineck-1
    2,   11,   15,   19,   22,   30
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*Nset, nset=Set-zero, instance=omnineck-1
   95,   96,  109,  110,  516,  517
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*Elset, elset=Set-zero, instance=omnineck-1
    2,   30,   39,   64,   65,   72
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*Elset, elset=_Surf-bottom_S3, internal, instance=omnineck-1
    2,   30,   64,   65,   72,   73
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*Elset, elset=_Surf-bottom_S1, internal, instance=omnineck-1
   39,  154,  467, 1640, 1729, 2007, 2020, 2325, 2695, 2751, 3294, 3579, 4068
*Elset, elset=_Surf-bottom_S4, internal, instance=omnineck-1
  666, 1229, 1250, 1471, 1679, 1718
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*Elset, elset=_Surf-bottom_S2, internal, instance=omnineck-1
 1203, 1334, 1430, 1563, 1637, 1643
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*Surface, type=ELEMENT, name=Surf-bottom
_Surf-bottom_S3, S3
_Surf-bottom_S1, S1
_Surf-bottom_S4, S4
_Surf-bottom_S2, S2
*Elset, elset=_Surf-bound_S4, internal, instance=omnineck-1
   15,   59,  354,  395,  771, 2028, 2542, 2707, 2771, 3196, 3316, 3759, 3795, 3995
*Elset, elset=_Surf-bound_S1, internal, instance=omnineck-1
   68, 1010, 1315
*Elset, elset=_Surf-bound_S3, internal, instance=omnineck-1
  123,  135,  240,  241,  306,  323
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*Elset, elset=_Surf-bound_S2, internal, instance=omnineck-1
 1007, 1731, 1906, 1957, 2253, 2314, 2504, 2723, 2823, 3519, 3609, 3748, 3765, 3833, 3836
*Surface, type=ELEMENT, name=Surf-bound
_Surf-bound_S4, S4
_Surf-bound_S1, S1
_Surf-bound_S2, S2
_Surf-bound_S3, S3
** Constraint: Constraint-bound
*Coupling, constraint name=Constraint-bound, ref node=Set-RP-1, surface=Surf-bound
*Kinematic
**
** INTEGRATED OUTPUT SECTIONS
**
*Integrated Output Section, name=I-Section-1, surface=Surf-bottom, project orientation=NO
*End Assembly
**
** MATERIALS
**
*Material, name=PU
*Elastic
5., 0.475
**
** BOUNDARY CONDITIONS
**
** Name: BC-bottom Type: Symmetry/Antisymmetry/Encastre
*Boundary
Set-bottom, ENCASTRE
** ----------------------------------------------------------------
**
** STEP: Step-1
**
*Step, name=Step-1, nlgeom=YES
*Static
1., 1., 1e-05, 1.
**
** BOUNDARY CONDITIONS
**
** Name: BC-RP Type: Displacement/Rotation
*Boundary
Set-RP-1, 1, 1, u1
Set-RP-1, 2, 2, u2
Set-RP-1, 3, 3, u3
Set-RP-1, 4, 4, ur1
Set-RP-1, 5, 5, ur2
Set-RP-1, 6, 6, ur3
**
** OUTPUT REQUESTS
**
*Restart, write, frequency=0
**
** FIELD OUTPUT: F-Output-1
**
*Output, field
*Node Output
U,
*Element Output, directions=YES
S,
**
** HISTORY OUTPUT: H-Output-1
**
*Output, history
*Integrated Output, section=I-Section-1
SOF, SOM
*End Step
